<?xml version="1.0"?>

<!-- Propeller nasal config actually calculates the thrust and stuff, and the fuel-flow-rate is calculated there too -->

<!-- turbine_engine name="nasalEngine">
	<milthrust> 	  0.0 </milthrust>
	<idlen1>         30.0 </idlen1>
	<idlen2>         60.0 </idlen2>
	<maxn1>         100.0 </maxn1>
	<maxn2>         100.0 </maxn2>
	<augmented>         0 </augmented>
	<injected>          0 </injected>

	<function name="IdleThrust">
		<table>
			<independentVar lookup="row">velocities/mach</independentVar>
			<independentVar lookup="column">atmosphere/density-altitude</independentVar>
			<tableData>
				-10000     0     10000   20000   30000   40000   50000
				0.0  0.0430  0.0488  0.0528  0.0694  0.0899  0.1183  0.1467
				0.2  0.0500  0.0501  0.0335  0.0544  0.0797  0.1049  0.1342
				0.4  0.0040  0.0047  0.0020  0.0272  0.0595  0.0891  0.1203
				0.6  0.0     0.0     0.0     0.0     0.0276  0.0718  0.1073
				0.8  0.0     0.0     0.0     0.0     0.0474  0.0868  0.0900
				1.0  0.0     0.0     0.0     0.0     0.0     0.0552  0.0800
			</tableData>
		</table>
	</function>

	<function name="MilThrust">
		<table>
			<independentVar lookup="row">velocities/mach</independentVar>
			<independentVar lookup="column">atmosphere/density-altitude</independentVar>
			<tableData>
				-10000       0   10000   20000   30000   40000   50000
				0.0   1.2600  1.0000  0.7400  0.5340  0.3720  0.2410  0.1490
				0.2   1.1710  0.9340  0.6970  0.5060  0.3550  0.2310  0.1430
				0.4   1.1500  0.9210  0.6920  0.5060  0.3570  0.2330  0.1450
				0.6   1.1810  0.9510  0.7210  0.5320  0.3780  0.2480  0.1540
				0.8   1.2580  1.0200  0.7820  0.5820  0.4170  0.2750  0.1700
				1.0   1.3690  1.1200  0.8710  0.6510  0.4750  0.3150  0.1950
				1.2   1.4850  1.2300  0.9750  0.7440  0.5450  0.3640  0.2250
				1.4   1.5941  1.3400  1.0860  0.8450  0.6280  0.4240  0.2630
			</tableData>
		</table>
	</function>

</turbine_engine -->

<turboprop_engine name="nasalEngine">
	<milthrust> 0 </milthrust>
	<maxpower unit="HP"> 0 </maxpower>
	<psfc unit="LBS/HR/HP">0.55 </psfc>
	<itt_delay>      0.05 </itt_delay>
	<idlen1>         50.0 </idlen1>
	<startern1>      20.0 </startern1>
	<maxn1>         100.0 </maxn1>
	<maxstartenginetime>16</maxstartenginetime>

<function name="EnginePowerVC">
<table>
  <description> Engine power, function of airspeed and pressure </description>
  <independentVar lookup="row">atmosphere/P-sl-psf</independentVar>
  <independentVar lookup="column">velocities/ve-kts</independentVar>
  <tableData>
               0     50    100    150    200    250		270
     503   0.357  0.380  0.400  0.425  0.457  0.486		0.512
    1048   0.586  0.589  0.600  0.621  0.650  0.686		0.720
    1328   0.707  0.721  0.731  0.757  0.786  0.821		0.874
    1496   0.779  0.786  0.808  0.821  0.857  0.900		0.981
    1684   0.850  0.857  0.874  0.900  0.943  0.979		1.210
    1896   0.914  0.929  0.946  0.971  1      1.057		1.341
    2135   1      1.011  1.029  1.043  1.083  1.150		1.450
    2213   1.029  1.043  1.057  1.079  1.114  1.171		1.500
  </tableData>
</table>
</function>

<table name="EnginePowerRPM_N1" type="internal">
  <description> Engine Power, function of RPM and N1 </description>
  <tableData>
          0		5		60	    86		92		96		98		100
       0  0   	0		0		0		0		0		0		0
     800  0   	1		280		900		880		960		1200	1400
    1200  0   	1		320		1400	1900	2250	2400	2500
    1400  0   	1		360		1600	2100	2350	2550	2700
    1800  0   	2		400		1800	2200	2400	2580	2700
    2200  0   	3		480		1900	2300	2450	2600	2700
  </tableData>
</table>

<table name="ITT_N1" type="internal">
	<description> Inter-Turbine Temperature ITT [deg C] depending on N1 and engine run </description>
   <tableData>
             0     1
       0     0     0
      15   100   100
      60   180   520
      96   270   680
     100   280   730
   </tableData>
</table>

</turboprop_engine>
